Дано
N := 27
Q_1 := (1 + 0.1*N)*10^-4 = 0.00037
ORIGIN := 1
(м/c)^3
Q_2 := (120 - N)*10^-5 = 0.00093
l1 := 0.2 + 0.01*N = 0.47  # м
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l2 := 2 + 0.1*N = 4.7  # м
l3 := 2.5 + 0.1*N = 5.2  # м
l4 := 3 + 0.1*N = 5.7  # м
l5 := 3.5 + 0.1*N = 6.2  # м
l6 := 4 + 0.1*N = 6.7  # м
l7 := 5 + 0.1*N = 7.7  # м
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K_м := 1 + 0.01*N = 1.27
Рц := 1.3*10^7 - 10^5*N = 10300000  # Па
Ргм := 3*10^6 + 1.2*N*10^5 = 6240000  # Па
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V_в := 1.2
p_в := 5*10^4  # Па
V_с := 2  # м/с
p_с := 5*10^5  # Па
V_н := 7
p_н := Рц
σ := 50*10^6  # Па
# Рассчётные расходы | Предельно допустимые скорости | Давления
Q := [Q_1 + Q_2; Q_1 + Q_2; Q_1; K_м*Q_1; K_м*Q_1; Q_2; Q_2; Q_2; K_м*Q_1 + Q_2]
Vmax := [V_в; V_н; V_н; V_н; V_с; V_н; V_н; V_с; V_с]
p := [p_в; p_н; p_н; p_н; p_с; p_н; p_н; p_с; p_с]
# Рассчётные внутренние диаметры | Рассчётные толщины стенок
D := 2*sqrt(Q/(π*Vmax)) = [0.0371395; 0.0153772; 0.00820365; 0.00924504; 0.0172959; 0.0130061; 0.0130061; 0.0243322; 0.029853]
δ := vectorize(D*p)/σ = [3.71395e-5; 0.00316771; 0.00168995; 0.00190448; 0.000172959; 0.00267926; 0.00267926; 0.000243322; 0.00029853]
# Выбор труб | Фактические внутренние диаметры
# Труба_1  = (38*0.4*470*ГОСТ8734 - 75)/(В10ГОСТ8733 - 87)
# Труба_2  = (22*3.2*4700*ГОСТ8734 - 75)/(В10ГОСТ8733 - 87)
# Труба_3  = (12*1.8*5200*ГОСТ8734 - 75)/(В10ГОСТ8733 - 87)
d := [
    37.2*10^-3;
    15.6*10^-3;
    8.4*10^-3;
    9.4*10^-3;
    17.4*10^-3;
    13.4*10^-3;
    13.4*10^-3;
    24.4*10^-3;
    30*10^-3
]
# Труба_4.1= (15*2.8*5200*ГОСТ8734 - 75)/(В10ГОСТ8733 - 87)
# Труба_4.2= (18*0.3*500*ГОСТ8734 - 75)/(В10ГОСТ8733 - 87)
# Труба_5  = (19*2.8*6200*ГОСТ8734 - 75)/(В10ГОСТ8733 - 87)
# Длины участков
# Труба_6.1  = (19*2.8*6200*ГОСТ8734 - 75)/(В10ГОСТ8733 - 87)
# Труба_6.2  = (28*1.8*500*ГОСТ8734 - 75)/(В10ГОСТ8733 - 87)
l := [0.47; 4.7; 5.2; 5.2; 0.5; 6.2; 6.2; 0.5; 7.7]
# Труба_7  = (32*1*7700*ГОСТ8734 - 75)/(В10ГОСТ8733 - 87)
# Фактические скорости
V := 4*Q/(π*d^2) = [1.1961; 6.80149; 6.67657; 6.77111; 1.97614; 6.59452; 6.59452; 1.9889; 1.98045]
Таблица
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# Выбор жидкости
# Жидкость: масло И-20А
# Характеристики по ГОСТ 20799 - 2022:
# Плотность: 890 кг/м^3
# Кинематическая вязкость: 29 мм^2/с
ρ := 890  # кг/м^3
v := 29*10^-6  # м^2/с
μ := v*ρ = 0.02581
Υ := ρ*9.81 = 8730.9
# Значения числа Рейнольдса
Re := vectorize(V*d)/v = [1534.31; 3658.73; 1933.9; 2194.77; 1185.68; 3047.13; 3047.13; 1673.42; 2048.74]
λ :=
    m ← 1
    while m ≤ 9
        λ[m] ← Re[m]/64 if Re[m] ≥ 2320
        λ[m] ← Re[m] if Re[m] < 2320
        m ← m + 1  # error: Пустой местозаполнитель.
# коэффициенты гидравлического трения
λ :=
    m ← 1
    while m ≤ 9
        λ[m] ← 64/Re[m] if Re[m] ≤ 2320
        λ[m] ← 0.3164/Re[m]^0.25 if Re[m] > 2320
        m ← m + 1
    λ
λ = [0.0417126; 0.0406821; 0.0330937; 0.0291602; 0.0539774; 0.0425857; 0.0425857; 0.038245; 0.0312386]
Потери давления в линейном сопротивлении
Δp_l := Υ*λ*(l/d)*V^2/(2*9.81) = [63130.6; 2041331; 1967032; 2023134; 172321; 1918987; 1918987; 174555; 173075]
Таблица
Потери давления в местном сопротивлении
ζ_вс := 0.5
ζ_сп := 2
ζ_р := 8
ζ_вр := 1
ζ_рп := 1
ζ_ф := 10
# Коэффициенты местных сопротивлений
ζ := [
    0;
    ζ_рп + ζ_вс;
    ζ_р + ζ_вр;
    ζ_вс + ζ_р;
    ζ_вс + ζ_р;
    ζ_р + ζ_вр;
    ζ_вс + ζ_р;
    ζ_вс + ζ_р;
    ζ_сп + ζ_ф + ζ_вр
]
# Потери давления на местных сопротивлениях
Δp_m := Υ*vectorize(ζ*V^2)/(2*9.81) = [0; 30878.8; 178529; 173420; 14771.1; 174168; 164492; 14962.6; 22689.9]
Таблица
# Общие потери давления
Δp_ц := Δp_l[2] + Δp_l[3] + (Δp_l[4] + Δp_l[5] + Δp_l[7])*K_м + Δp_m[2] + Δp_m[3] + (Δp_m[4] + Δp_l[5] + Δp_m[7])*K_м = 10091110
Δp_гм := Δp_l[2] + Δp_l[6] + Δp_l[7] + Δp_l[8] + Δp_l[9] + Δp_m[6] + Δp_m[7] + Δp_m[8] + Δp_m[9] = 6603248
p_нц := Δp_ц + Рц = 20391110
p_нгм := Δp_гм + Ргм = 12843248
# Размещение и потери дросселя
Δp_др6.2 := p_нц - p_нгм = 7547862
d_др6.2 := sqrt(4*Q_1/(μ*π*sqrt(2*Δp_др6.2/ρ))) = 0.0118385
ζ_др6.2 := 2*9.81*Δp_др6.2/(Υ*V[8]^2) = 4287.83
# 3. Построение характеристикик гидролиний
# Ламинарный поток (Re < 2320): Потеря давления линейно зависит от расхода по формуле Пуазёйля:
#
# μ — динамическая вязкость жидкости,
# L — длина трубы,
# D — диаметр трубы,
# Q — объёмный расход.
#
# График ΔP от Q будет прямой линией.
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# Турбулентный поток (Re > 4000): Используется формула Дарси-Вейсбаха:
#
# где:
#
# f — коэффициент трения (зависит от Re и шероховатости),
# ρ — плотность жидкости,
# V — средняя скорость потока.
#
# Поскольку V пропорционален Q, ΔP пропорционален Q² (при постоянном f). График будет параболой.
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Δp(Q) := □  # error: Пустой местозаполнитель.
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