# ОСНОВЫ РАСЧЁТА И ПРОЕКТИРООВАНИЯ
# РЕКУПЕРАТИВНОГО ТЕПЛООБМЕННОГО АППАРАТА ТРУБЧАТОГО ТИПА
## Исходные данные
# Номер зачётки
N := 2388327
# Тепловая производительность
# теплообменного аппарата
Q := 8.0*10^6*10^3/3600  # Дж/с
# Схема движения теплоносителей
# 2 - Противоток
# Температура греющей воды при входе
# в теплообменный аппарат
t'_1 := 135  # ⁰C
# Температура греющей воды при
# выходе из теплообменного аппарата
t''_1 := 98  # ⁰C
# Температура нагреваемой воды при
# входе в теплообменный аппарат
t'_2 := 67  # ⁰C
# Температура нагреваемой воды при
# выходе из теплообменного аппарата
t''_2 := 101  # ⁰C
# Материал трубок теплообменного
# аппарата
Латунь
# Коэффициент теплопроводности
# материала трубок
λ := 117  # Вт/(м∙К)
# Температура стенок трубок, принятая при расчёте
t_cm := 99  # ⁰C
# Наружный диаметр трубок
# теплообменного аппарата
d_н := 16*10^-3
# Внутренний диаметр трубок
# теплообменного аппарата
d_вн := 14*10^-3
# коэффициент учитывающий потери тепла поверхностью подогревателя в окружающую среду
η_n := 0.97
## Цель расчёта
# Произвести тепловой и конструктивный расчет отопительного
# секционного водоводяного подогревателя
## Расчёт и проектирование
# 1) Для нагреваемой воды:
# Средняя температура:
t_1ср := (t'_1 + t''_1)/2 = 116.5  # ⁰C
# Массовая теплоемкость согласно таблице:
C'_p := 4.250*10^6  # Дж/кг·К
# Плотность согласно таблице:
ρ' := 943.1  # кг/м³
# Средний объемный расход:
V_1 := Q/(C'_p*(t'_1 - t''_1)*ρ'*η_n) = 1.54478e-5  # м^3/с
# 2) Для нагреваемой воды:
# Средняя температура:
t_2ср := (t'_2 + t''_2)/2 = 84  # ⁰C
# Массовая теплоемкость согласно таблице:
C''_p := 4.208*10^6  # Дж/кг·К
# Плотность согласно таблице:
ρ'' := 965.3  # кг/м³
# Средний объемный расход:
V_2 := Q/(C''_p*(t''_2 - t'_2)*ρ''*η_n) = 1.65882e-5  # м^3/с
